*HEADING
  Growth simulation by rectagular expander
  It is designed to produce lowest fidelity simulation
*********************************************************
** paper, Zöllner et al., "Growth on demand: Reviewing **
** the mechanobiology of stretched skin", referred.    **
**                                                     **
** Input file is written by Taeksang Lee               **
*********************************************************
**
*PARAMETER
lam= 0.598
mu= 0.814
xn0_1=0.
xn0_2=0.
xn0_3=1.
kk= 0.432
tcrt=1.1567
mm= 1.000
nn= 1.000
t_init1=0.005
t_init2=0.05
t_max1=0.005
t_max2=0.05
**
******************************************************
****************************************************** MODEL DEFINITION
******************************************************
*Part, name=skin
*Node
       1,         100.,         100.,           3.
      2,         100.,          95.,           3.
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*Element, type=C3D8, elset=elskin
  1,   64,   65,   86,   85,    1,    2,   23,   22
  2,   65,   66,   87,   86,    2,    3,   24,   23
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*Solid Section, elset=elskin, material=tissue
,
*end part
*PART, name=expander
*Node, nset=nall
1,30.000000,20.000000,-2.500000
2,34.444444,20.000000,-2.500000
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************************************************
************************************************ element definition for fluid cavity
************************************************
*Element, type=F3D4, elset=elfluid
1,1,2,4,3
2,2,69,70,4
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************************************************
************************************************
************************************************
*Element, type=S4R, elset=elexpd
339,1,2,4,3
340,2,69,70,4
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*NODE, NSET=MFLUID
**9999, 50., 50., -1.25
343, 50., 50., -1.25
**FlUID PROPERTY, NAME=water, ELSET=elfluid, REF NODE=9999,TYPE=hydraulic
*FlUID PROPERTY, NAME=water, ELSET=elfluid, REF NODE=343,TYPE=hydraulic
*FLUID DENSITY
 9.97E-7
*FLUID BULK MODULUS
 2.2E3
**
*Shell Section, ELSET=elexpd, MATERIAL=si
 1.,5
*END PART
*assembly, name=assembly-1
*instance, name=inst-expander, part=expander
**
*END INSTANCE
*instance, name=inst-skin, part=skin
**
*END INSTANCE
*Nset, nset=nexpd_all, generate, internal, instance=inst-expander, unsorted
1, 342,     1
*Nset, nset=nexpd_all2, generate, internal, instance=inst-expander, unsorted
1000, 1341,     1
*Nset, nset=nexpd_bt, instance=inst-expander
  1,   2,   3,   4,   5,   6
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*Elset, elset=el_fluid, generate, internal, INSTANCE=inst-expander
1, 338,     1
*Elset, elset=_surf_expd, generate, internal, INSTANCE=inst-expander
339, 676,     1
*Surface, type=ELEMENT, name=surf_expd
_surf_expd, SNEG
*Elset, elset=_surf_skin, internal, instance=inst-skin
  21,  22,  23,  24,  25,  26
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*Surface, type=ELEMENT, name=surf_skin
_surf_skin, S5
******************************************
******************************************
******************************************
*Elset, elset=elskin, generate, internal, INSTANCE=inst-skin
    1,  800,     1
*Nset, nset=nskin_fixed_broad, internal, INSTANCE=inst-skin
   43,    44,    45,    46,    47,    48
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
*Nset, nset=nskin_fixed, internal, INSTANCE=inst-skin
   43,   44,   45,   46,   47,   48
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*Nset, nset=nskin_fixed_outer, internal, INSTANCE=inst-skin
1,    2,    3,    4,    5,    6
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*end assembly
*************************
************************* expander properties as silicon
*************************
*Material, name=si
*Expansion
1000.
*Hyperelastic, neo hooke
0.43631, 0.013
*************************
************************* skin material with growth user materials
*************************
*Material, name=tissue
*Depvar
6
*User Material, constants=9, unsymm
<lam>, <mu>, <xn0_1>, <xn0_2>,<xn0_3>, <kk> , <tcrt>, <mm>
<nn>
*INITIAL CONDITIONS, TYPE=SOLUTION, USER
*************************
************************* BOUNDARY CONDITIONS
*************************
*BOUNDARY
nexpd_bt, 1, 1
nexpd_bt, 2, 2
nexpd_bt, 3, 3
**nskin_fixed, 1, 1
**nskin_fixed, 2, 2
**nskin_fixed, 3, 3
nskin_fixed_broad,1,1
nskin_fixed_broad,2,2
nskin_fixed_broad,3,3
nskin_fixed_outer, 1, 1
nskin_fixed_outer, 2, 2
nskin_fixed_outer, 3, 3
*Nset, nset=nall, generate, internal, instance=inst-expander
1, 342,     1
*************************
************************* AMPLITUDE INFORMATION
*************************
*Amplitude, name=AMP_PID, definition=user
**0.,0., 2.,1., 6.,1., 8.,0.
*************************
************************* INTERACTION
*************************
*Surface Interaction, name=contct
1.,
*Friction
0.,
*Contact Pair, interaction=contct, type=SURFACE TO SURFACE
**Contact Pair, interaction=contct
surf_skin, surf_expd
*************************
************************* STEP
*************************
*Step, name=Step-1, nlgeom=YES, inc=100000
*Static
**include, input=param.param
<t_init1>, 8, 1e-09, 0.05
*Nset, nset=nall, generate, internal, instance=inst-expander
1, 342,     1
*NSET, NSET=MFLUID, internal, INSTANCE=inst-expander
343
*Boundary, amplitude=AMP_PID
MFLUID, 8, 8, 1.0
*Output, field, time interval=0.1
*Node Output
U,COORD
*Element Output
S,COORD,SDV,EVOL
*Output, history, SENSOR, name=VOL_EXP
*NODE OUTPUT, NSET=MFLUID
CVOL
*Output, history, SENSOR, name=PRES_EXP
*NODE OUTPUT, NSET=MFLUID
PCAV
*End Step
*Step, name=Step-2, nlgeom=YES, inc=100000
*Static
**include, input=param.param
1, 22, 1e-09, 0.1
*Nset, nset=nall, generate, internal, instance=inst-expander
1, 342,     1
*NSET, NSET=MFLUID, internal, INSTANCE=inst-expander
343
*Boundary, amplitude=AMP_PID
MFLUID, 8, 8, 1.0
*Output, field, time interval=0.1
*Node Output
U,COORD
*Element Output
S,COORD,SDV,EVOL
*Output, history, SENSOR, name=VOL_EXP
*NODE OUTPUT, NSET=MFLUID
CVOL
*Output, history, SENSOR, name=PRES_EXP
*NODE OUTPUT, NSET=MFLUID
PCAV
*End Step
